<Node name="root" dt="0.02" gravity="0 -10 0">
    <RequiredPlugin name="Sofa.Component.Constraint.Projective"/> <!-- Needed to use components [FixedProjectiveConstraint] -->
    <RequiredPlugin name="Sofa.Component.LinearSolver.Direct"/> <!-- Needed to use components [SparseLDLSolver] -->
    <RequiredPlugin name="Sofa.Component.LinearSolver.Iterative"/> <!-- Needed to use components [CGLinearSolver] -->
    <RequiredPlugin name="Sofa.Component.Mass"/> <!-- Needed to use components [UniformMass] -->
    <RequiredPlugin name="Sofa.Component.ODESolver.Backward"/> <!-- Needed to use components [EulerImplicitSolver] -->
    <RequiredPlugin name="Sofa.Component.SolidMechanics.FEM.Elastic"/> <!-- Needed to use components [HexahedronFEMForceField] -->
    <RequiredPlugin name="Sofa.Component.StateContainer"/> <!-- Needed to use components [MechanicalObject] -->
    <RequiredPlugin name="Sofa.Component.Topology.Container.Grid"/> <!-- Needed to use components [RegularGridTopology] -->
    <RequiredPlugin name="Sofa.Component.Visual"/> <!-- Needed to use components [VisualStyle] -->
    <RequiredPlugin name="SofaMatrix"/> <!-- Needed to use components [GlobalSystemMatrixExporter] -->
    <RequiredPlugin name="BandMatrix"/>

    <VisualStyle displayFlags="showBehaviorModels showForceFields" />

    <!--<Node name="M1">
        <EulerImplicitSolver name="odesolver" printLog="false"  rayleighStiffness="0.1" rayleighMass="0.1" />
        <MatrixLinearSystem template="CompressedRowSparseMatrixMat3x3d"/>
        <SparseLDLSolver printLog="false" template="CompressedRowSparseMatrixMat3x3d"/>
        <GlobalSystemMatrixExporter exportEveryNumberOfSteps="1" filename="screenshots/BandMatrixTestSolver/global_matrix_ldl" printLog="true" format="jpg" precision="12"/>
        <MechanicalObject />
        <UniformMass vertexMass="1"/>
        <RegularGridTopology nx="4" ny="4" nz="10" xmin="-9" xmax="-6" ymin="0" ymax="3" zmin="0" zmax="9" />
        <FixedProjectiveConstraint indices="0 1 2 3 4 5 6 7 8 9 10 11 12 13 14 15" />
        <HexahedronFEMForceField name="FEM" youngModulus="4000" poissonRatio="0.3" method="large" />
    </Node>-->


   <Node name="M4">
        <EulerImplicitSolver name="odesolver" printLog="false"  rayleighStiffness="0.1" rayleighMass="0.1" />
        <BandMatrixSolver template="BandMatrix" iterations="25" tolerance="1e-5" threshold="1e-5"/>

        <GlobalSystemMatrixExporter exportEveryNumberOfSteps="1" filename="screenshots/BandMatrixTestSolver/global_matrix_band" printLog="false" format="jpg"/>
        <MechanicalObject />
        <UniformMass vertexMass="1"/>
        <RegularGridTopology nx="4" ny="4" nz="10" xmin="-6" xmax="-3" ymin="0" ymax="3" zmin="0" zmax="9" />
        <FixedProjectiveConstraint indices="0 1 2 3 4 5 6 7 8 9 10 11 12 13 14 15" />
        <HexahedronFEMForceField name="FEM" youngModulus="4000" poissonRatio="0.3" method="large" />
    </Node>


</Node>
